N := 13
rght := 1704
j := sqrt(-1)
IMP(Z, N, Lbrd, Rbrd, wgt) :=
    for i ∈ 0 .. Rbrd - Lbrd
        x[i] ← (Z[i]^-1 + 50^-1)^-1
        w[i] ← 2*(0.54 - 0.46*cos(2*π*i*Rbrd^-1))
    u ← (x - mean(x))
    for i ∈ 0 .. Rbrd - Lbrd
        y[i + Lbrd] ← u[i]*w[i]^wgt
    for i ∈ Rbrd + Lbrd .. 2^N - Lbrd
        y[i + Lbrd] ← 0
    ICFFT(y - mean(y)*1)
fs := 2.5
p := 0 .. rght
O2Z(osc, r) :=
    for t ∈ 0 .. trunc(rows(osc)*3^-1) - 1
        for i ∈ 0 .. rght
            ref[i, t] ← osc[t*3, i + 15]
            sens[i, t] ← osc[t*3 + 1, i + 15]
            phi[i, t] ← osc[t*3 + 2, i + 15]*2^-13*π
    for t ∈ 0 .. trunc(rows(osc)*3^-1) - 1
        for i ∈ 0 .. rght
            x[i, t] ← sens[:, t][i]/ref[:, t][i]*e^(-j*phi[:, t][i])
            zz[i, t] ← r*(1 + 3/5*x[i, t])/(1 - x[i, t])
    Zm ← cols(zz)^-1*sum(zz[:, k], k = 0 .. cols(zz) - 1)
    transpose([Zm, zz])
# [component: outputs U50R]
# [component: outputs UKZ]
# [component: outputs UXX]
ww[p] := 2*(0.54 - 0.46*cos(2*π*p*rght^-1))
Z2S(z, z0) :=
    for i ∈ 0 .. rows(z) - 1
        s[i] ← (z[i] + z0)/(z[i] - z0)
    s
S2Z(ss, z0) :=
    for i ∈ 0 .. rows(ss) - 1
        z[i] ← (1 + ss[i])/(1 - ss[i])*z0
    z
# [component: outputs Uraw11]
# [component: outputs Uraw]
r11(sxx, skz, sload) :=
    for i ∈ 0 .. rows(sxx) - 1
        rr[i] ← (sxx[i] + skz[i] - 2*sload[i])/(sxx[i] - skz[i])
    rr
r00(sload) := sload
# [component: outputs Uraw12]
# [component: outputs Uraw1]
r01(sxx, skz, sload) :=
    for i ∈ 0 .. rows(sxx) - 1
        rr[i] ← 2*(sxx[i] - sload[i])*(sload[i] - skz[i])/(sxx[i] - skz[i])
    rr
scorr(s, sload, r01, r11) :=
    for i ∈ 0 .. rows(s) - 1
        sk[i] ← (s[i] - sload[i])/(r11[i]*(s[i] - sload[i]) + r01[i])
    sk
# [component: outputs Uraw13]
# [component: outputs Uraw2]
# [component: outputs Uraw14]
# [component: outputs Uraw3]
# [component: outputs Uraw15]
# [component: outputs Uraw4]
# [component: outputs Uraw16]
# [component: outputs Uraw5]
# [component: outputs Uraw17]
# [component: outputs Uraw18]
# [component: outputs Uraw6]
# [component: outputs Uraw19]
# [component: outputs Uraw7]
# [component: outputs Uraw8]
# [component: outputs Uraw9]
# [component: outputs Uraw10]
Z50R := O2Z(U50R, 50)[0]
SXX := Z2S(O2Z(UXX, 50)[0], 50)
SKZ := Z2S(O2Z(UKZ, 50)[0], 50)
S50R := Z2S(O2Z(U50R, 50)[0], 50)
R00 := r00(S50R)
R01 := r01(SXX, SKZ, S50R)
R11 := r11(SXX, SKZ, S50R)
Sraw := Z2S(O2Z(Uraw, 50)[0], 50)  # disabled
prepareZcorr(Uraw) :=
    Sraw ← Z2S(O2Z(Uraw, 50)[0], 50)
    SCorr ← scorr(Sraw, R00, R01, R11)
    Zcorr ← S2Z(SCorr, 50)
    Zcorr
SCorr := scorr(Sraw, R00, R01, R11)  # disabled
Zcorr := S2Z(SCorr, 50)  # disabled
Zcorr := prepareZcorr(Uraw)
Zcorr12 := prepareZcorr(Uraw12)
Zcorr13 := prepareZcorr(Uraw13)
Zcorr1 := prepareZcorr(Uraw1)
Zcorr14 := prepareZcorr(Uraw14)
Zcorr2 := prepareZcorr(Uraw2)
NoiseAmplitude := 450
Zcorr3 := prepareZcorr(Uraw3)
Zcorr15 := prepareZcorr(Uraw15)
velocity := 299792458
Zcorr4 := prepareZcorr(Uraw4)
Zcorr16 := prepareZcorr(Uraw16)
εoil := 2.95
Zcorr5 := prepareZcorr(Uraw5)
Zcorr17 := prepareZcorr(Uraw17)
peakWidth := 0.8
Zcorr6 := prepareZcorr(Uraw6)
Zcorr18 := prepareZcorr(Uraw18)
Lmax := 20
Zcorr7 := prepareZcorr(Uraw7)
Zcorr19 := prepareZcorr(Uraw19)
error := 0.001
Zcorr8 := prepareZcorr(Uraw8)
timeZero := 8.4705
Zcorr9 := prepareZcorr(Uraw9)
N := 2^12 = 4096
Zcorr10 := prepareZcorr(Uraw10)
shiftFlag := 1
Zcorr11 := prepareZcorr(Uraw11)
endIndex := 2700
shiftData(res) :=
    result ← matrix(2, 1, f(i, j) ← 0)
    N ← rows(res[0])
    for n ∈ 0 .. N - 1
        t ← res[0][n]
        if t ≥ timeZero
            nZero ← n
            break
    newSize ← N - 1 - nZero
    ZShifted ← matrix(newSize, 1, f(i, j) ← 0)
    TShifted ← matrix(newSize, 1, f(i, j) ← 0)
    for n ∈ 0 .. newSize
        ZShifted[n] ← res[1][n + nZero]
        TShifted[n] ← res[0][n + nZero] - t
    dT ← TShifted[1] - TShifted[0]
    for n ∈ 0 .. trunc(peakWidth/(2*dT))
        ZShifted[n] ← 0
    result[0] ← TShifted
    result[1] ← ZShifted
    result
prepareZT(Z) :=
    FMIN ← 137.5*10^6
    FMAX ← 4.4*10^9
    Z ←
        tmp ← matrix(N, 1, f(x, y) ← 0)
        for i ∈ 0 .. 1704
            tmp[i] ← Z[i]
        for i ∈ 1704 .. N - 1
            tmp[i] ← 0
        tmp
    df ← (FMAX - FMIN)/1704
    fmax ← FMIN + df*(N - 1)
    HannWindow(f) ←
        0.5*(1 - cos(2*π*(f - FMIN)/(FMAX - FMIN))) if FMIN ≤ f ≤ FMAX
        0 otherwise
    prepareData(Z, fmin, fmax, N) ←
        ZMatched ← matrix(N, 1, f(i, j) ← 0)
        ZArrayNoMean ← matrix(N, 1, f(i, j) ← 0)
        ZArrayWindow ← matrix(N, 1, f(i, j) ← 0)
        T ← matrix(N, 1, f(i, j) ← 0)
        result ← matrix(2, 1, f(i, j) ← 0)
        Δf ← (fmax - fmin)/N
        f(n) ← fmin + n*Δf
        for n ∈ 0 .. N - 1
            ZMatched[n] ← (Z[n]*50)/(Z[n] + 50)
        for n ∈ 0 .. N - 1
            ZArrayNoMean[n] ← ZMatched[n]
        Mean ← 0
        CounterMean ← 0
        for n ∈ 0 .. N - 1
            if FMIN ≤ f(n) ≤ FMAX
                Mean ← Mean + ZArrayNoMean[n]
                CounterMean ← CounterMean + 1
        Mean ← Mean/CounterMean
        for n ∈ 0 .. N - 1
            ZArrayNoMean[n] ← ZArrayNoMean[n] - Mean if FMIN ≤ f(n) ≤ FMAX
            ZArrayWindow[n] ← ZArrayNoMean[n]*HannWindow(f(n))
        A ← ICFFT(ZArrayWindow)
        dT ← 10^9/(fmax - fmin)
        for n ∈ 0 .. N - 1
            A[n] ← |A[n]|
            T[n] ← n*dT
        result[0] ← T
        result[1] ← A
        result
    res ← prepareData(Z, FMIN, fmax, N)
    res ← shiftData(res) if shiftFlag == 1
    [res; fmax]
ClarifyPeak(T, Y, t1) :=
    dT ← T[1] - T[0]
    u(t) ← interp(cspline(T, Y), T, Y, t)
    Tm ← root(d/dt(u(t)), t, t1 - dT, t1 + dT)
    Tl ← root(u(Tm)*0.7 - u(t), t, Tm - peakWidth/2, Tm)
    Tr ← root(u(Tm)*0.7 - u(t), t, Tm, Tm + peakWidth/2)
    center ← integral(u(t)*t, t = Tl .. Tr)*integral(u(t), t = Tl .. Tr)^-1
    center
smooth(Y, n, i) :=
    left ← Y[0] if i - 1 < 0
    left ← Y[i - 1] otherwise
    right ← Y[n - 1] if i + 1 ≥ n
    right ← Y[i + 1] otherwise
    (left + 2*Y[i] + right)/4
findMaxima(Y) :=
    maxima ← matrix(endIndex, 2, f(x, y) ← 0)
    prev ← Y[0]
    goup ← 1
    count ← 0
    for i ∈ 0 .. endIndex - 1
        cur ← smooth(Y, rows(Y), i)
        if goup == 1
            if prev > cur and i > 0
                maxima[count, 0] ← i - 1
                maxima[count, 1] ← prev
                count ← count + 1
                goup ← 0
        otherwise
            goup ← 1 if prev < cur
        prev ← cur
    maxima
endIndex
findTwoReflections(T, Y) :=
    res ← findMaxima(Y)
    rowMax ← match(max(res[:, 1]), res[:, 1])[0]
    indMax ← res[rowMax, 0]
    indMax2 ← 0
    max2 ← 0
    for i ∈ 0 .. rows(res) - 1
        continue if i == rowMax
        indCur ← res[i, 0]
        ampCur ← res[i, 1]
        trace("Tcur={0},Ampcur={1},i={2},dT={3}", T[indCur], ampCur, i, T[indMax] - T[indCur])
        continue if |T[indMax] - T[indCur]| < peakWidth
        if max2 ≤ ampCur
            indMax2 ← indCur
            max2 ← ampCur
            trace("max2={0}", max2)
    return [T[indMax2], Y[indMax2]; T[indMax], Y[indMax]] if T[indMax] > T[indMax2]
    return [T[indMax], Y[indMax]; T[indMax2], Y[indMax2]] if T[indMax] < T[indMax2]
findTwoReflectionsTest(T, Y) :=
    res ← findMaxima(Y)
    rowMax ← match(max(res[:, 1]), res[:, 1])[0]
    indMax ← res[rowMax, 0]
    indMax2 ← 0
    max2 ← 0
    for i ∈ rowMax + 1 .. rows(res) - 1
        indCur ← res[i, 0]
        continue if |T[indMax] - T[indCur]| < peakWidth
        continue if T[indMax] - T[indCur] > 5
        if max2 ≤ res[i, 1]
            indMax2 ← res[i, 0]
            max2 ← res[i, 1]
    [T[indMax], Y[indMax]; T[indMax2], Y[indMax2]]
MeasureLevel(T, Y, T2, Y2) :=
    dT ← (T[1] - T[0])
    Lair ← 0
    Loil ← 0
    Lwater ← 0
    res ← findTwoReflections(T, Y)
    Amp1 ← res[0, 1]
    trace("t0={0},Amp0={1},t1={2},Amp1={3}", res[0, 0], Amp1, res[1, 0], res[1, 1])
    if Amp1 > NoiseAmplitude
        Amp2 ← res[1, 1]
        trace("t0={0},Amp0={1},t1={2},Amp1={3}", res[0, 0], Amp1, res[1, 0], Amp2)
        if Amp2 > NoiseAmplitude
            t0 ← ClarifyPeak(T2, Y2, res[0, 0])
            t1 ← ClarifyPeak(T2, Y2, res[1, 0])
            trace("t0={0},Amp0={1},t1={2},Amp1={3}", t0, Amp1, t1, Amp2)
            Lair ← t0*10^-9*velocity/2
            Loil ← (t1/2 - t0/2)*(10^-9*velocity/sqrt(εoil))
            Lwater ← Lmax - Lair - Loil
            trace("Lair={0},Loil={1},Lwater={2}", Lair, Loil, Lwater)
            return ["Air-oil", Lair, Loil, 0] if Lwater ≤ 0
            return ["Air-oil-water", Lair, Loil, Lwater] otherwise
        otherwise
            t ← ClarifyPeak(T2, Y2, res[0, 0])
            trace("tnew={0}", t)
            Lair ← t*10^-9*velocity/2
            Δ ← Lmax - Lair
            return ["Air-water", Lair, 0, Δ] if error < Δ
            return ["Air. ERROR: The line is longer than Lmax", Lair, 0, 0] if Δ < 0
            return ["Air", Lmax, 0, 0]
    return ["No first reflection", Lair, Loil, Lwater] otherwise
    ["Air-oil-water", Lair, Loil, Lwater]
processing(Z) :=
    [res; fmax] ← prepareZT(Z)
    res2 ← MeasureLevel(res[0], res[1], res[0], res[1])
    [res; res2; fmax]
res0 := processing(Zcorr)
res8 := processing(Zcorr8)
res16 := processing(Zcorr16)
res0[1] = ["Air-oil-water", 0.299561, 0.0981984, 19.6022]
res8[1] =  # error: Эта переменная не определена.
res16[1] =  # error
res1 := processing(Zcorr1)
res9 := processing(Zcorr9)
res17 := processing(Zcorr17)
res1[1] =  # no stored result
res9[1] =  # no stored result
res17[1] =  # no stored result
res2 := processing(Zcorr2)
res10 := processing(Zcorr10)
res18 := processing(Zcorr18)
res2[1] =  # no stored result
res10[1] =  # no stored result
res18[1] =  # no stored result
res3 := processing(Zcorr3)
res11 := processing(Zcorr11)
res19 := processing(Zcorr19)
res3[1] =  # no stored result
res11[1] =  # no stored result
res19[1] =  # no stored result
res4 := processing(Zcorr4)
res12 := processing(Zcorr12)
res4[1] =  # no stored result
res12[1] =  # no stored result
res5 := processing(Zcorr5)
res13 := processing(Zcorr13)
res5[1] =  # no stored result
res13[1] =  # no stored result
res6 := processing(Zcorr6)
res14 := processing(Zcorr14)
res6[1] =  # no stored result
res14[1] =  # no stored result
res7 := processing(Zcorr7)
res15 := processing(Zcorr15)
res7[1] =  # no stored result
res15[1] =  # no stored result
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